// COMSOL Multiphysics 6.2.0.339 model "COMSOL_Project_ConeEnd_Nguyen.mph"
// Outline of the model tree

Geometry
  geom1 "Geometry 1" (3D, length unit in)
    cyl1: Cylinder | r = .5; h = 2
    rev1: Revolve
      revolvefrom = faces
      inputface = cyl1(1) boundaries 4
      angle2 = 90
      pos = {1, 0}
      revaxis = {{1, 0}, {0, 1}}
    cyl2: Cylinder | pos = {1, 0, 3}; axistype = x; r = .5
    rev2: Revolve
      revolvefrom = faces
      inputface = cyl2(1) boundaries 4
      angle2 = 90
      pos = {1, 0}
      revaxis = {{1, 0}, {0, 1}}
    cyl3: Cylinder | pos = {1, 0, 3}; axistype = x; r = .5
    rot1: Rotate | input = rev2; pos = {3, 0, 3}; axistype = y; rot = 90
    rev4: Revolve
      revolvefrom = faces
      inputface = rot1(1) boundaries 1
      angle2 = 90
      pos = {-1, 0}
      axis = {0, -1}
      revaxis = {{-1, 0}, {0, -1}}
    cyl4: Cylinder | pos = {4, 0, 6}; axistype = x; r = .5
    rev5: Revolve
      revolvefrom = faces
      inputface = cyl4(1) boundaries 4
      angle2 = 90
      pos = {-1, 0}
      axis = {0, -1}
      revaxis = {{-1, 0}, {0, -1}}
    cone1: Cone | pos = {6, 0, 7}; r = .5; h = 2; specifytop = radius; rtop = 1
    fin: Finalize "Form Union"

Materials
  mat1: Common "Water" on all domains
    def "Basic"
      thermalexpansioncoefficient = alpha_p(T)
      bulkviscosity = muB(T)
      dynamicviscosity = eta(T)
      ratioofspecificheat = gamma_w(T)
      electricconductivity = 5.5e-6[S/m]
      heatcapacity = Cp(T)
      density = rho(T)
      thermalconductivity = k(T)
      soundspeed = cs(T)
      eta: Piecewise
        arg = T
        pieces = 
          {273.15, 413.15, 1.3799566804-0.021224019151*T^1+1.3604562827E-4*T^2-4.6454090319E-7*T^3+8.9042735735E-10*T^4-9.0790692686E-13*T^5+3.8457331488E-16*T^6}
          {413.15, 553.75, 0.00401235783-2.10746715E-5*T^1+3.85772275E-8*T^2-2.39730284E-11*T^3}
        argunit = K
        fununit = Pa*s
      Cp: Piecewise | arg = T; pieces = {273.15, 553.75, 12010.1471-80.4072879*T^1+0.309866854*T^2-5.38186884E-4*T^3+3.62536437E-7*T^4}; argunit = K; fununit = J/(kg*K)
      rho: Piecewise
        arg = T
        smooth = contd1
        pieces = 
          {273.15, 293.15, 6.3092789034e-05*T^3-0.0603676398829*T^2+18.9229382407066*T-950.704055329848}
          {293.15, 373.15, 1.0335053319e-05*T^3-0.0133950656345*T^2+4.96928883266*T+432.257114008512}
        argunit = K
        fununit = kg/m^3
      k: Piecewise | arg = T; pieces = {273.15, 553.75, -0.869083936+0.00894880345*T^1-1.58366345E-5*T^2+7.97543259E-9*T^3}; argunit = K; fununit = W/(m*K)
      cs: Interpolation | table = {{273, 1403}, {278, 1427}, {283, 1447}, {293, 1481}, {303, 1507}, {313, 1526}, {323, 1541}, {333, 1552}, {343, 1555}, {353, 1555}, {363, 1550}, {373, 1543}}; interp = piecewisecubic; fununit = m/s; argunit = K
      an1: Analytic | funcname = alpha_p; expr = -1/rho(T)*d(rho(T),T); args = T; fununit = 1/K; argunit = K
      an2: Analytic | funcname = gamma_w; expr = 1+(T/Cp(T))*(alpha_p(T)*cs(T))^2; args = T; fununit = 1; argunit = K
      an3: Analytic | funcname = muB; expr = 2.79*eta(T); args = T; fununit = Pa*s; argunit = K

Physics
  spf: LaminarFlow on all domains
    dependent variable u = {u, v, w}
    fp1: FluidProperties (default)
    init1: init "Initial Values 1" (default)
    wallbc1: WallBC "Wall 1" (default) | BoundaryCondition = Slip
    inl1: InletBoundary "Inlet 1" on boundaries 3 | U0in = 2
    out1: OutletBoundary "Outlet 1" on boundaries 43

Mesh
  mesh1 "Mesh 1" (physics-controlled)
    size: MeshSizeDefault | table = cfd; hauto = 6

Studies
  std1 "Study 1"
    stat: Stationary

Solver configurations
  sol1 "Solution 1" (study std1)
    v1: Variables "Dependent Variables 1"
    s1: Stationary "Stationary Solver 1"
      fc1: FullyCoupled | linsolver = d1; initstep = 0.01; maxiter = 100
      d1: Direct "Direct, fluid flow variables (spf)" | linsolver = pardiso; pivotperturb = 1.0E-13

Datasets
  dset1: Solution | solution = sol1
  surf1: Surface "Exterior Walls" on boundaries 1, 2, 5-10, 12-15, 17-22, 25-30, 32-35, 37-42, 45, 46 | data = dset1
  cpl1: CutPlane | data = dset1; quickplane = xz

Plots
  pg1: PlotGroup3D "Velocity (spf)" | data = dset1
    slc1: Slice | expr = spf.U
  pg2: PlotGroup3D "Pressure (spf)" | data = surf1
    surf1: Surface | expr = p
      tran1: Transparency
  pg3: PlotGroup2D "Velocity Cut Plane" | data = cpl1
    surf1: Surface | expr = spf.U
  pg4: PlotGroup2D "Pressure Cut Plane" | data = cpl1
    surf1: Surface | expr = p; descr = Pressure
  pg5: PlotGroup2D "Pressure Contour" | data = cpl1
    con1: Contour | expr = p; descr = Pressure
    arws1: ArrowSurface | planecoordsys = cartesian; expr = {u, v, w}; descr = Velocity field

Exports
  img1: Image "Velocity_Cone"
    size = manualweb
    unit = px
    width = 640
    height = 480
    pngfilename = E:\COMSOL Project\Velocity_Cone.png
  img2: Image "Pressure_Cone"
    size = manualweb
    unit = px
    width = 640
    height = 480
    pngfilename = E:\COMSOL Project\Pressure_Cone.png
  img3: Image "Pressure_Contour_Cone"
    size = manualweb
    unit = px
    width = 640
    height = 480
    pngfilename = E:\COMSOL Project\Pressure_Contour_Cone.png